// COMSOL Multiphysics 5.2.1.262 model "Matlab generated Eslab.mph"
// Untitled\n\n
// Outline of the model tree

Parameters
  Lbox = 1e-6
  LPML = 0.5e-6
  Ldes = 9e-07
  Lsource = 0.4e-6
  epsr = 12
  hh = 0.03e-6

Coordinate systems
  pml1: PML "Perfectly Matched Layer 1" on domains 1, 7

Geometry
  geom1 "Geometry 1" (2D, length unit m)
    r1: Rectangle | base = center; size = {Lbox, hh}
    r2: Rectangle | pos = {-Lbox/2-LPML/2, 0}; base = center; size = {LPML, hh}
    r3: Rectangle | pos = {Lbox/2+LPML/2, 0}; base = center; size = {LPML, hh}
    r7: Rectangle | base = center; size = {Ldes, hh}
    pt1: Point (disabled) | p = {-Lsource, hh/2}
    pt2: Point (disabled) | p = {-Lsource, -hh/2}
    r8: Rectangle | pos = {-Lsource/2, 0}; base = center; size = {Lsource, hh}
    pt3: Point "center"
    fin: Finalize "Form Union"

Materials
  mat4: Common "Material 4" on all domains
    def "Basic"
      relpermeability = 1
      electricconductivity = 0[S/m]
      relpermittivity = 1
  mat6: Common "Material 6" on domains 4, 5
    def "Basic"
      relpermeability = 1
      electricconductivity = 0[S/m]
      relpermittivity = epsr
      pw2: Piecewise | funcname = chi_y; arg = y; pieces = {{-(Lbox/2+LPML), -(Ldes/2), 0}, {-(Ldes/2), (Ldes/2), 1}, {(Ldes/2), (Lbox/2+LPML), 0}}
      pw3: Piecewise | funcname = chi_x; arg = x; pieces = {{-(Lbox/2+LPML), -(Ldes/2), 0}, {-(Ldes/2), (Ldes/2), 1}, {(Ldes/2), (Lbox/2+LPML), 0}}

Physics
  emw: ElectromagneticWaves "Electromagnetic Waves, Frequency Domain" on all domains
    dependent variable E = {Ex, Ey, Ez}
    components.components = outofplane
    BackgroundField.WaveType = GaussianBeam
    AnalysisMethodology.MethodologyOptions = Fast
    wee1: WaveEquationElectric (default)
    pec1: PerfectElectricConductor (default)
    init1: init "Initial Values 1" (default)
    lco1: LineCurrentOutOfPlane (disabled) on points 5, 6 | Iop = 1
    pc1: PeriodicCondition on boundaries 2, 3, 5, 6, 8, 9, 11, 12, 14, 16, 18, 19, 21, 22
    scu1: SurfaceCurrent "Surface Current Density 1" on boundaries 7 | Js0 = {0, 0, 1/hh}

Mesh
  mesh1 "Mesh 1"
    size: MeshSizeDefault | hauto = 2
    map1: Map "Mapped 1" (disabled) on remaining entities
    ftri1: FreeTri "Free Triangular 1" on remaining entities

Studies
  std3 "Study 3"
    freq: Frequency "Frequency Domain" | punit = Hz; plist = 3e8/(1500e-9)

Solver configurations
  sol3 "Solution 3" (study std3)
    v1: Variables "Dependent Variables 1"
    s1: Stationary "Stationary Solver 1" | stol = 0.01
      p1: Parametric | pname = freq; plistarr = 3e8/(1500e-9); punit = Hz; pcontinuationmode = no
      fc1: FullyCoupled
      d1: Direct | linsolver = pardiso

Datasets
  dset2: Solution | solution = sol3

Derived values
  int1: IntSurface "Surface Integration 1" on domains 4, 5 | data = dset2; expr = abs(emw.Ez)^2; unit = kg^2*m^4/(s^6*A^2)
  pev1: EvalPoint "Point Evaluation 1" on points 10 | data = dset2; expr = abs(emw.Ez)^2; unit = kg^2*m^2/(s^6*A^2)

Plots
  pg2: PlotGroup2D "Electric Field (emw) 1" | data = dset2
    surf1: Surface | expr = emw.Ez
  pg3: PlotGroup2D "epsr" | data = dset2
    surf1: Surface | expr = emw.epsrAv